*Heading
** Job name: Job-10 Model name: Model-5
** Generated by: Abaqus/CAE 2020
*Preprint, echo=NO, model=NO, history=NO, contact=NO
**
** PARTS
**
*Part, name=Vagina
*Node
      1,   2.14872932,   3.89628839,   9.45653057
      2,   2.34672427,   4.25531244,   9.45653057
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*Element, type=C3D8R
 1,    8,  145, 1538,  162,    1,  113, 1523,  144
 2,  145,    5,  160, 1538,  113,    2,  114, 1523
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*Nset, nset=Bottom
   14,   15,   17,   18,   30,   31
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*Elset, elset=Bottom
   64,   80,  338,  354,  370,  386
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*Nset, nset=Distal
    1,    2,    3,    4,    5,    6
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*Elset, elset=Distal
    1,    2,    3,    4,    5,    6
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*Nset, nset=Mid
    1,    2,    5,    8,    9,   10
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*Elset, elset=Mid
   33,   34,   35,   36,   37,   38
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*Nset, nset=Proximal
   13,   14,   15,   16,   17,   18
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*Elset, elset=Proximal
   49,   50,   51,   52,   53,   54
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*Nset, nset=Top
    3,    4,    6,    7,   23,   24
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*Elset, elset=Top
   31,   32,  111,  112,  143,  144
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*Nset, nset=Vagina, generate
    1,  6225,     1
*Elset, elset=Vagina, generate
    1,  4040,     1
*Elset, elset=_Bottom_S4, internal
  64,  80, 338, 354, 370, 386
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*Elset, elset=_Bottom_S5, internal
  979,  980, 1191, 1192, 1223, 1224, 1255, 1256, 1479, 1480, 1511, 1512, 1543, 1544
*Elset, elset=_Bottom_S2, internal
 3145, 3146, 3147, 3148, 3149, 3150
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*Elset, elset=_Bottom_S1, internal, generate
 4033,  4040,     1
*Surface, type=ELEMENT, name=Bottom
_Bottom_S4, S4
_Bottom_S5, S5
_Bottom_S2, S2
_Bottom_S1, S1
*Elset, elset=_Top_S5, internal
   31,   32,  111,  112,  143,  144
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*Elset, elset=_Top_S3, internal
  901,  902, 1545, 1546, 1577, 1578, 1609, 1610
*Elset, elset=_Top_S2, internal
 2377, 2378, 2379, 2380, 2381, 2382
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*Surface, type=ELEMENT, name=Top
_Top_S5, S5
_Top_S3, S3
_Top_S2, S2
*Elset, elset=_Lumen_S6, internal
    1,    3,    5,    7,    9,   11
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*Elset, elset=_Lumen_S3, internal
   49,   50,   51,   52,   53,   54
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*Elset, elset=_Lumen_S4, internal
  289,  290,  291,  292,  293,  294
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*Elset, elset=_Lumen_S2, internal
 322, 739, 740
*Elset, elset=_Lumen_S1, internal, generate
 3081,  3144,     1
*Surface, type=ELEMENT, name=Lumen
_Lumen_S6, S6
_Lumen_S3, S3
_Lumen_S4, S4
_Lumen_S2, S2
_Lumen_S1, S1
*Orientation, name=Ori-1, system=CYLINDRICAL
          0.,           0.,           0.,           0.,           0.,           1.
1, 0.
** Section: Distal
*Solid Section, elset=Distal, orientation=Ori-1, controls=EC-1, material=HGO-Distal
,
*Orientation, name=Ori-2, system=CYLINDRICAL
          0.,           0.,           0.,           0.,           0.,           1.
1, 0.
** Section: Mid
*Solid Section, elset=Mid, orientation=Ori-2, controls=EC-1, material=HGO-Mid
,
*Orientation, name=Ori-3, system=CYLINDRICAL
          0.,           0.,           0.,           0.,           0.,           1.
1, 0.
** Section: Proximal
*Solid Section, elset=Proximal, orientation=Ori-3, controls=EC-1, material=HGO-Proximal
,
*End Part
**
**
** ASSEMBLY
**
*Assembly, name=Assembly
**
*Instance, name=Vagina-1, part=Vagina
*End Instance
**
*End Assembly
**
** ELEMENT CONTROLS
**
*Section Controls, name=EC-1, DISTORTION CONTROL=YES, ELEMENT DELETION=YES, hourglass=ENHANCED, second order accuracy=YES
1., 1., 1.
*Amplitude, name=Constant
             0.,              1.,              1.,              1.
*Amplitude, name=Inflation
             0., 0., 1., 1.
*Amplitude, name=Smooth, definition=SMOOTH STEP
             0.,              0.,              1.,              1.
**
** MATERIALS
**
*Parameter
Pi = 3.141592654
beta1 = 40.78
beta2 = 18.85
beta3 = 63.2
c1 = cos(beta1*Pi/180)
s1 = sin(beta1*Pi/180)
c11 = c1
s11 = -s1
c2 = cos(beta2*Pi/180)
s2 = sin(beta2*Pi/180)
c22 = c2
s22 = -s2
c3 = cos(beta3*Pi/180)
s3 = sin(beta3*Pi/180)
c33 = c3
s33 = -s3
C10 = 0.003
D1 = 0.05
k1 = 1.0
k2 = 1.0
kap = 0.25
N = 2
T1 = 1.35
T2 = 1.36
*Material, name=HGO-Distal
*Density
 0.003655,
*Depvar, delete=16
     16,
*User Material, constants=14
<C10>,    <D1>,     <k1>,     <k2>,    <kap>,      <N>,      0.,  <c1>
  <s1>,      0.,  <c11>,   <s11>,    <T1>,     <T2>
*Material, name=HGO-Mid
*Density
 0.003655,
*Depvar, delete=16
     16,
*User Material, constants=14
 <C10>,    <D1>,     <k1>,     <k2>,    <kap>,      <N>,      0.,  <c2>
  <s2>,      0.,  <c22>,   <s22>,    <T1>,     <T2>
*Material, name=HGO-Proximal
*Density
 0.003655,
*Depvar, delete=16
     16,
*User Material, constants=14
 <C10>,    <D1>,     <k1>,     <k2>,    <kap>,      <N>,      0.,  <c3>
  <s3>,      0.,  <c33>,   <s33>,    <T1>,     <T2>
**
** BOUNDARY CONDITIONS
**
** Name: BC-1 Type: Symmetry/Antisymmetry/Encastre
*Boundary
Vagina-1.Bottom, ENCASTRE
** Name: BC-2 Type: Displacement/Rotation
*Boundary
Vagina-1.Top, 1, 1
Vagina-1.Top, 2, 2
Vagina-1.Top, 3, 3
** ----------------------------------------------------------------
**
** STEP: Inflation
**
*Step, name=Inflation, nlgeom=YES, inc=10000, unsymm=YES
*Static, stabilize=0.0002, allsdtol=0.05, continue=NO
0.0001, 1., 1e-15, 0.01
**Solution Technique, type=quasi-newton
**
** LOADS
**
** Name: Needle   Type: Pressure
**Dsload, amplitude=Constant
**Vagina-1.Top, P, 0.006
** Name: Pressure   Type: Pressure
*Dsload, amplitude=Inflation
Vagina-1.Lumen, P, 0.050
**
** CONTROLS
**
*Controls, reset
*Controls, analysis=discontinuous
*Controls, parameters=time incrementation
, , , , , , , 20, , ,
**
** OUTPUT REQUESTS
**
*Restart, write, frequency=0
**
** FIELD OUTPUT: F-Output-1
**
*Output, field
*Node Output
U
*Element Output, directions=YES
S, SDV, STATUS
**
** HISTORY OUTPUT: H-Output-1
**
*Output, history, variable=PRESELECT
*Node Print
U
*El Print, position=AVERAGED AT NODES
SDV2, SDV3, SDV11, SDV12, SDV14, SDV15
*El Print
SDV16
*End Step
**
** STEP: Load/Stiffness Generation
**
*Step, name=Global_Load_Vector
*MATRIX GENERATE, STIFFNESS, LOAD
*MATRIX OUTPUT, STIFFNESS, LOAD, FORMAT=COORDINATE
*Dsload
Vagina-1.Lumen, P, 0.050
*End Step
